$PROBLEM CESAR CIV-boot_029 EuroTARGET PKPD Sunitinib   model by YU et al
;; 1. Based on: suni_cov_0.05_0_focei_1
;; 2. Description: CESAR EuroTARGET SAEM
;; x1. Author: Achim Fritsch, edited by Olga Teplitska


; SAEM

;-----------------------------------------
;  UNITS                                  |
;  TIME - HOURS                           |
;  DOSE - UG                              |
;  CP  - NG/ML  -> UG/L                   |
;  LLOQ - 0.06 NG/ML                      |
;  CL - L/HOUR                            |
;  VOLUMES - L                            |
;------------------------------------------

$INPUT C	SET_1	SET_2	SET_3	SET_4	SET_5	SET_6	SET_7	SET_8	SET_9	SET_10	ID	ETID=DROP	DAT=DROP	CTIME=DROP	TRTW	TIME	TAD	AMT	DOS	DV=DROP	LNDV=DV	EVID	MDV	CMT	TRTM	F_LAG	LOQS	LOQSM	LOQP	STUDY	CENTER	AGE	SEX	WEIGHT	HEIGHT


$DATA C:/Users/Olga/Suni_Pazo/Suni_PK_final_new.csv ; corrected dataset with split variables

IGNORE=C
IGNORE(C.EQ.1)     ; Excluded Data records (no DV record, BLQ)
IGNORE(SET_1.EQ.1) ; Analyse only train data for respective split

$SUBROUTINE ADVAN6 TOL=4

$MODEL
NCOMP =5
COMP = (DEPOT, DEFDOSE)  ; Dosing compartment
COMP = (OBSLIV)          ; Sunitinib central compartment
COMP = (PERISUN)         ; Sunitinib peripheral compartment
COMP = (CENTRALM)        ; SU12662 central compartment
COMP = (PERIM)           ; SU12662 peripheral compartment

$PK
WT= WEIGHT ; Missing data is imputed according to original model (Diekstra et al.)
IF(WT.EQ.-99.AND.SEX.EQ.1) WT = 83  ; ET Population mean - male
IF(WT.EQ.-99.AND.SEX.EQ.0) WT = 75  ; ET Population mean - female
ASCL   = (WT/70)**0.75 ; scaling factors for clearance and volume of distribution; applied to be able to compare with literature values
ASV    = WT/70


K12    = THETA(1)
TVV2   = THETA(2)*ASV
V2     = TVV2 * EXP(ETA(1))
QH     = THETA(3)*ASCL
TVCLP  = THETA(4)*ASCL
CLP    = TVCLP * EXP(ETA(3))
CLM    = THETA(5)*ASCL
TVV3   = THETA(6)*ASV
V3     = TVV3 * EXP(ETA(2))
Q34    = THETA(7)*ASCL
V4     = THETA(8)*ASV
TVFM   = THETA(9)
FM     = TVFM * EXP(ETA(4))
Q25    = THETA(10)*ASCL
V5     = THETA(11)*ASV

MU_1 = LOG(TVV2)
MU_2 = LOG(TVV3)
MU_3 = LOG(TVCLP)
MU_4 = LOG(TVFM)

K34 = Q34/V3
K43 = Q34/V4
K25 = Q25/V2
K52 = Q25/V5

S2 = V2
S3 = V3

$DES
CLIV = (K12*A(1) + QH/V2*A(2))/(QH+CLP)

DADT(1) = -K12*A(1)
DADT(2) = QH*CLIV-QH/V2*A(2) - K25*A(2) + K52*A(5)
DADT(3) = FM*CLP*CLIV-CLM/V3*A(3)-K34*A(3) + K43*A(4)
DADT(4) = K34*A(3)-K43*A(4)
DADT(5) = K25*A(2) - K52*A(5)

$ERROR
TY = LOG(F)
IF(F.LT.0.001) TY = 0.001
IPRED = TY
EXPIPRED = EXP(IPRED)

IF (CMT.EQ.2) THEN
W     = SQRT(THETA(12)**2)
Y     = IPRED+W*EPS(1)
ENDIF

IF (CMT.EQ.3) THEN
W     = SQRT(THETA(13)**2)
Y     = IPRED+W*EPS(2)
ENDIF

IRES = DV-IPRED
  DEL            = 0
  IF(W.EQ.0) DEL = 0.0001
  IWRES          = IRES/(W+DEL)

$THETA
(0, 0.34); 1 = K12   Absorption rate constant
(0, 1360); 2 = V2   Central volume of distribution of sunitinib
80 FIX; 3 = QH   Hepatic blood flow
(0, 35.7)  ; 4 = CLP   Clearance of sunitinib
(0, 17.1)   ; 5 = CLM   Clearance of SU12662
(0, 635) ; 6 = V3   Central volume of distribution of SU12662
(0, 20.1) ; 7 = Q34   Inter-compartmental clearance of SU12662
(0, 388)  ; 8 = V4   Peripheral volumes of distribution of SU12662
 0.21 FIX ; 9 = FM   Fraction of sunitinib converted to SU12662
(0, 0.371)  ; 10 = Q25  Inter-compartmental clearance of Sunitinib ; not in Yu
588 FIX ; 11 = V5   Peripheral volumes of distribution of Sunitinib
0.06 ; 12 =  Prop. Error Suni
0.03  ; 13 = Prop. Error Metab

$OMEGA BLOCK(4); block structure, IIV of 20% for unknown parameters (standard value), cov= 0.05 (Yu et al. initial estimates, which Diekstra et al. model is based on), small covariance values set to 0 as in Diekstra et al.; IIV FM and V2 set to 0.1 (closer to Diekstra et al. final estimates)
 0.1  ;1 IIV V2
 0.05 0.579     ;2 IIV V3
 0 0.05 0.2     ;3 IIV CLP
 0 0 0.05 0.1   ;4 IIV FM


$SIGMA
 1 FIX  ; Proportional error sunitinib
 1 FIX  ; Proportional error SU12662

$EST METHOD=SAEM AUTO=1 NITER=1000 PRINT=20 MSFO=etspkfboot_01s.msf ; estimation with SAEM
$EST METHOD=IMP EONLY=1 PRINT=1 NITER=20 ISAMPLE=1000 MAPITER=0 ; obtain objective function and standard errors with SAEMs last values

$COVARIANCE PRINT=E

$TABLE ID TIME IPRED EXPIPRED PRED DV CMT IWRES IRES CWRES NOPRINT ONEHEADER FILE=Suni_saem_split_1.tab
$TABLE ID TIME ETA1 ETA2 ETA3 ETA4 ASCL ASV NOPRINT NOAPPEND ONEHEADER FILE=etas_Suni_saem_split_1.tab
